# OpenSim document version 40600
Model:
  Ground
  BodySet:
    Body pendulum_mass: mass=1 [kg] mass_center=(0 0 0) inertia=(1 1 1 0 0 0)
      Brick pendulum_mass_geom_1: half_lengths=(0.1 0.1 0.1)
  JointSet:
    PinJoint: socket_parent_frame=ground_offset socket_child_frame=pendulum_mass_offset
      Coordinate rz
      PhysicalOffsetFrame ground_offset: socket_parent=/ground
      PhysicalOffsetFrame pendulum_mass_offset: socket_parent=/bodyset/pendulum_mass translation=(0 0.2 0) [meters]
